variable        h equal 1.6
variable        skin equal 0.5*${h} # Verlet list range
variable        contact_stiffness equal 0.1*70

units		si
dimension       3
boundary        sm sm sm
atom_style      tlsph
comm_style      tiled
#atom_modify	map array
neighbor        ${skin} bin
neigh_modify    every 10 delay 0 check yes # only build neighbor list if particle has moved half the skin distance
comm_modify     vel yes cutoff 10.0
newton          off
read_data       mesh2_adjusted.data
group           projectile type 2
group           target type 1

#set             atom 28975 diameter 10.0
#set             atom 10825 diameter 10.0
#set             atom 9625 diameter 10.0

velocity        projectile set 0 0.0 969.5 sum no units box

pair_style      hybrid/overlay tlsph sph2/hertz
##                         strength EOS                          rh0        E     nu     Q1   Q2   hg   c0    E     nu   hg    sigy     max.strain  max.stress Q1   Q2
#pair_coeff      1 1 tlsph linearplastic            shock_eos    2700.0e-9  70    0.3    0.1  0.0  10  0&
#                          2000 1.46 2.77 0 0 0 0 0 0 0 &
#                          0 0 0.3 0 0 0 0 0 0 0
#
#pair_coeff      2 2 tlsph linearplastic            shock_eos     2700.0e-9  70   0.3    0.1  0.0  10  0&
#                          2000 1.46 2.77 0 0 0 0 0 0 0 &
#                          0 0 0.3 0 0 0 0 0 0 0

#                         strength EOS                          rh0        E     nu     Q1   Q2   hg  Cp

pair_coeff      1 1 tlsph *COMMON  2700.0e-9  70   0.3  0.0  0.0 10 910 &
                          *JOHNSON_COOK 0.3241 0.1138 0.42 0.002 1.0e-3 298 893 1.34 &
                          *EOS_POLYNOMIAL 0 74.2 60.5 36.5 1.96 0 0 &
                          *END


pair_coeff      1 1 tlsph johnson_cook        polynomial_eos    2700.0e-9  70   0.3    0.0  0.0   10  910 &
                          0 74.2 60.5 36.5 1.96 0 0 0 0 0 &
                          0 0 0.3241 0.1138 0.42 0.002 1.0e-3 298 893 1.34

pair_coeff      2 2 tlsph johnson_cook        polynomial_eos    2700.0e-9  70   0.3    0.0  0.0  10 910 &
                          0 74.2 60.5 36.5 1.96 0 0 0 0 0 &
                          0 0 0.3241 0.1138 0.42 0.002 1.0e-3 298 893 1.34

pair_coeff      1 2 sph2/hertz ${contact_stiffness}

variable        mx_atom atom mass*vx
compute         mx all reduce sum v_mx_atom
variable        my_atom atom mass*vy
compute         my all reduce sum v_my_atom

compute         E all sph2/tlsph_strain
compute         P all sph2/plastic_strain
compute         S all sph2/tlsph_stress
compute         d all sph2/damage
compute         nn all sph2/tlsph_num_neighs
compute         contact_radius all sph2/contact_radius
compute         eint all sph2/internal_energy
compute         alleint all reduce sum c_eint
variable        etot equal ke+c_alleint+pe
variable        volume atom vol

balance          1.0 rcb

# time integration
timestep        1.0e-10
fix             dtfix all sph2/tlsph_dt_reset 5 0.1
fix             integration_fix all sph2/integrate_tlsph 1.5e3 -1 update
#variable        a equal 0.5*(f_force_fix2[1]-f_force_fix1[1])
#variable        disp equal 2.0*${vel}*f_dtfix[1]
#fix             output_fix all print 10 "${disp} $a" file force_displacement.dat screen no

variable        nrun equal 15000
variable        dumpFreq equal  round(${nrun}/200)
dump            dump_id all custom ${dumpFreq} dump.LAMMPS id type x y z &
                c_E[1] c_E[2] c_E[3] c_E[4] c_E[5] c_E[6] &
                c_S[1] c_S[2] c_S[3] c_S[4] c_S[5] c_S[6] &
                fx fy fz vx vy vz c_P c_eint proc &
                c_contact_radius c_nn mol c_d mass v_volume
#
dump_modify     dump_id first yes
#
thermo          10
thermo_style    custom step ke pe v_etot c_alleint dt time
run             ${nrun}

#unfix dtfix
#unfix integration_fix

#run 2000
#
#
#
